// SBML level 3 version 2

model EnzymeML_Lagerman()

  // Compartments:
  compartment Falcon_Tube = 5 u0;

  // Species:
  species E in Falcon_Tube = 0.2;  // substance in u2
  species EA in Falcon_Tube = 0.2;  // substance in u2
  species ED in Falcon_Tube = 0.2;  // substance in u2
  species E_PGME in Falcon_Tube = 0; E_PGME is "E·PGME";  // substance in u1
  species E_7_ADCA in Falcon_Tube = 0; E_7_ADCA is "E·7-ADCA";  // substance in u1
  species E_PG in Falcon_Tube = 0; E_PG is "E·PG";  // substance in u1
  species E_PGME_PGME in Falcon_Tube = 0; E_PGME_PGME is "E·PGME·PGME";  // substance in u1
  species EA_7_ADCA in Falcon_Tube = 0; EA_7_ADCA is "EA·7-ADCA";  // substance in u1
  species EA_PGME in Falcon_Tube = 0; EA_PGME is "EA·PGME";  // substance in u1
  species E_CEX in Falcon_Tube = 0; E_CEX is "E·CEX";  // substance in u1
  species PGME in Falcon_Tube = 20;  // substance in u1
  species _7_ADCA in Falcon_Tube = 42; _7_ADCA is "7-ADCA";  // substance in u1
  species CEX in Falcon_Tube = 0;  // substance in u1
  species PG in Falcon_Tube = 0;  // substance in u1

  // Parameters:
  K_si = 20 u1;
  K_n = 290 u1;
  v_r = 10000 u5;

  // Reactions:
  reaction_1: E + _7_ADCA -> E_7_ADCA; v_r*(K_n*E*_7_ADCA - E_7_ADCA); reaction_1 is "reaction-1";
  reaction_2: E + PGME -> E_PGME; v_r*(K_s*E*PGME - E_PGME); reaction_2 is "reaction-2";
    K_s = 14 u1;
  reaction_3: E_PGME => EA; k_2*E_PGME; reaction_3 is "reaction-3";
    k_2 = 432 u6;
  reaction_4: E_PGME + PGME -> E_PGME_PGME; v_r*(K_si*E_PGME*PGME - E_PGME_PGME); reaction_4 is "reaction-4";
  reaction_5: EA + PGME -> EA_PGME; v_r*(K_si*EA*PGME - EA_PGME); reaction_5 is "reaction-5";
  reaction_6: EA_PGME => E + PG; k_6*EA_PGME; reaction_6 is "reaction-6";
    k_6 = 1660 u6;
  reaction_7: EA => E + PG; k_3*EA; reaction_7 is "reaction-7";
    k_3 = 417 u6;
  reaction_8: E + PG -> E_PG; v_r*(K_pg*E*PG - E_PG); reaction_8 is "reaction-8";
    K_pg = 12 u1;
  reaction_9: EA + _7_ADCA -> EA_7_ADCA; v_r*(K_n*EA*_7_ADCA - EA_7_ADCA); reaction_9 is "reaction-9";
  reaction_10: EA_7_ADCA => E + PG + _7_ADCA; k_5*EA_7_ADCA; reaction_10 is "reaction-10";
    k_5 = 491 u6;
  reaction_11: EA_7_ADCA -> E_CEX; k_4*EA_7_ADCA - k_4b*E_CEX; reaction_11 is "reaction-11";
    k_4 = 73600 u6; k_4b = 9126 u6;
  reaction_12: E_CEX -> E + CEX; v_r*(K_p*E_CEX - E*CEX); reaction_12 is "reaction-12";
    K_p = 39 u1;
  Enzyme_deactivation: E => ED; k_d*E;
    k_d = 0.000643 u6;

  // Unit definitions:
  unit u0 = 1e-3 litre; u0 is "ml";
  unit u1 = 1e-3 mole / (10 litre); u1 is "mmole / l";
  unit u2 = 1e-6 mole / (10 litre); u2 is "umole / l";
  unit u3 = 10 kelvin; u3 is "K";
  unit u4 = 600 second; u4 is "min";
  unit u5 = (1e-3 litre)^2 / (1e-3 mole * 10 second); u5 is "ml^2 / s mmole";
  unit u6 = 1 / (10 second); u6 is "1 / s";
end
